L2(t, x, y) :=
    s ← 0
    n ← length(x) - 1
    for k ∈ 0 .. n
        a ← 1
        for j ∈ 0 .. n
            a ← a*(t - x[j])/(x[k] - x[j]) if j ≠ k
        s ← s + a*y[k]
    s
x := [0; 1; 2; 3; 5]
y := [1; -3; -23; -53; 1]
f(t) := L2(t, x, y) simplify → t^4 - 5*t^3 + 1
g(x) := e^(x^3)
a := 0
b := 2
n := 40
h := (b - a)/n
k := 0 .. n
x[k] := a + k*h
y[k] := g(x[k])
f1(t) := L2(t, x, y)
integral(f1(t), t = 0 .. 2) = 276.853
integral(g(x), x = 0 .. 2) = 276.853
