Nyu(f, g, m, n, e) :=
    a(x, y) ← d/dx(f(x, y))
    b(x, y) ← d/dy(f(x, y))
    c(x, y) ← d/dx(g(x, y))
    d(x, y) ← d/dy(g(x, y))
    i ← 0
    while |f(m, n)| > e and |g(m, n)| > e
        I ← det([a(m, n), b(m, n); c(m, n), d(m, n)])
        A ← det([f(m, n), b(m, n); g(m, n), d(m, n)])
        B ← det([a(m, n), f(m, n); c(m, n), g(m, n)])
        m ← m - A/I
        n ← n - B/I
        i ← i + 1
    r[0] ← m
    r[1] ← n
    r[2] ← i
    r
f(x, y) := sin(x + 1) - y - 1.2
g(x, y) := 2*x + cos(y) - 2
Nyu(f, g, 10060, 11111, 0.00000001) = [0.51015; -0.201838; 13]
A := [-1, 2; 2, -4]
det([-1, 2; 2, -4]) = 0
|A| = 0
