Given
f(x, y) := sin(x + 1) - y - 1.2
f(x, y) := 2*x + cos(y) - 2
f(x, y) solve →  # error: Unable to automatically determine which variables to solve for.
Given
sin(x + 1) - y = 1.2  # error: This variable is undefined.
2*x + cos(y) = 2  # error: This variable is undefined.
x, y solve →  # error
