f(x) := ln(x) + x - 2
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Nyuton(f, a, e) :=
    g(x) ← d/dx(f(x))
    i ← 0
    while |f(a)| > e
        i ← i + 1
        a ← a - f(a)/g(a)
    r[0] ← a
    r[1] ← i
    r
oraliq(f, a, b, e) :=
    i ← 0
    while |f(a)| > e
        t ← (a + b)/2
        i ← i + 1
        b ← t if f(a)*f(t) < 0
        a ← t otherwise
        r[1] ← i
    r[0] ← a
    r
oraliq(f, 1, 2, 0.00001) = [1.55714; 16]
Nyuton(f, 1.5, 0.0000001) = [1.55715; 2]
f(x) := sin(x) + x^2 - 1
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Nyuton(f, 1.5, 0.00001) = [0.636733; 4]
oraliq(f, -2, 0, 0.00001) = [-1.40963; 19]
oraliq(f, 0, 1, 0.00001) = [0.63673; 18]
Nyuton(f, -2, 0.0001) = [-1.40965; 3]
f(x) := ln(x)^2 + 0.25*x - 3
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Nyuton(f, 0.1, 0.00001) = [0.179233; 4]
Nyuton(f, 4, 0.00001) = [4.08308; 2]
oraliq(f, 0.1, 1, 0.00001) = [0.179233; 20]
oraliq(f, 4, 5, 0.00001) = [4.08307; 14]
f(x) := cos(x) + x^3 - 2
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Nyuton(f, 1, 0.00001) = [1.17258; 3]
oraliq(f, 0, 2, 0.00001) = [1.17258; 16]
f(x) := tan(x) + x^3 - 2
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