# Meler kvadratur formulasining  dasturi:
ORIGIN ≡ 1
n := 3
P(x) := 1/(2^n*n!)*d^n/dx^n((x^2 - 1)^n) expand → 5*x^3/2 - 3*x/2
a := P(x) coeffs, x → [0; -3/2; 0; 5/2]
T(x) := 2/((1 - x^2)*(d/dx(P(x)))^2)
x := polyroots(a)
x = [-0.774597; 0; 0.774597]
k := 1 .. n
A[k] := T(x[k])
A = [0.555556; 0.888889; 0.555556]
f(x) := sin(x^2)/e^x
integral(f(x), x = -1 .. 1) = 0.813614
sum(A[k]*f(x[k]), k = 1 .. n) = 0.825196
