B(n) :=
    for k ∈ 0 .. n
        b[k] ← (-1)^(n - k)/(n*k!*(n - k)!)*integral(if(k == 0, 1, product(t - j, j = 0 .. k - 1))*if(k == n, 1, product(t - j, j = k + 1 .. n)), t = 0 .. n)
    b
transpose(B(3)) → [1/8, 3/8, 3/8, 1/8]
f(x) := e^(x^2)
a := 0
b := 1
integral(f(x), x = 0 .. 1) = 1.46265
n := 5
h := (b - a)/n
i := 0 .. n
x[i] := a + i*h
y := B(n)
T := (b - a)*sum(y[i]*f(x[i]), i = 0 .. n)
T = 1.4628
f(x) := x^3
a := 0
b := 1
n := 1000
i := 0 .. n
h := (b - a)/n
x[i] := a + i*h
integral(f(x), x = a .. b) = 0.25
x =  # no stored result
S := h*sum(f(x[i]), i = 0 .. n)
S = 0.2505
