f(x) := e^x
a := 0
b := 2
n := 100
i := 0 .. n
h := (b - a)/n
x[i] := a + i*h
x = [
    0; 0.02; 0.04; 0.06; 0.08; 0.1; 0.12; 0.14; 0.16; 0.18
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]
S := integral(f(x), x = a .. b)
T := h*sum((f(x[i - 1]) + f(x[i]))/2, i = 1 .. n)
T = 6.38927
|S - T| = 0.000212967
S = 6.38906
g(x) := e^(x^3)
T1 := h*sum((g(x[i - 1]) + g(x[i]))/2, i = 1 .. n)
A1 := integral(g(x), x = 0 .. 2)
A1 = 276.853
T1 = 278.044
