# Simpson formulasining dasturi:
y(x) := e^(0.6*x)*cos(x)
T(f, a, b, n) :=
    h ← (b - a)/n
    k ← (b - a)/(6*n)
    s ← 0
    d ← 0
    for i ∈ 1 .. 2*n
        s ← s + 4*f(a + i*h*0.5) if mod(i, 2) == 1
        d ← d + 2*f(a + i*h*0.5) otherwise
    k*(s + d + f(a) + f(b))
N1 := integral(y(x), x = 0 .. π/2)
N1 = 1.44583
M1 := T(y, 0, π/2, 10)
M1 = 1.44583
R1 := |N1 - M1|
R1 = 2.90808e-7
