cht(f, a, b, n) :=
    h ← (b - a)/n
    s ← 0
    x ← a
    for i ∈ 0 .. n - 1
        s ← s + h*f(x)
        x ← x + h
    s
ot(f, a, b, n) :=
    h ← (b - a)/n
    s ← 0
    x ← a + h
    for i ∈ 0 .. n - 1
        s ← s + h*f(x)
        x ← x + h
    s
g(x) := e^x
f(x) := 2*x
cht(f, 0, 2, 100) = 3.96
cht(g, 0, 2, 100) = 6.32538
ot(f, 0, 2, 100) = 4.04
ot(g, 0, 2, 100) = 6.45316
integral(e^x, x = 0 .. 2) = 6.38906
mt(f, a, b, n) :=
    h ← (b - a)/n
    s ← 0
    x ← a
    y ← a + h
    for i ∈ 0 .. n - 1
        s ← s + h*f((x + y)/2)
        x ← x + h
        y ← y + h
    s
mt(g, 0, 2, 100) = 6.38895
