trap(f, a, b, n) :=
    h ← (b - a)/n
    s ← 0
    x ← a + h
    for i ∈ 1 .. n - 1
        s ← s + h*f(x)
        x ← x + h
    s ← h/2*(f(a) + f(b)) + s
    s
g(x) := e^x
trap(g, 0, 2, 100) = 6.38927
integral(e^x, x = 0 .. 2) = 6.38906
