n := 0 .. 3
i := 1 .. 3
r := 0.5
h := 1
a := 1
E := 0.5
u[0, n] := 0
u[1, 0] := 0
u[2, 0] := 1
u[3, 0] := 0
u[4, n] := 0
u[i, n + 1] := u[i, n] + r*E*(u[i + 1, n] - (2*u[i, n] - u[i - 1, n]))/h^2 - r*a*(u[i + 1, n] - u[i - 1, n])/(2*h)
u[i, n + 1] = [0; 0.5; 0.5; 0; 0.25; 0.5; 0; 0.125; 0.375; 0; 0.0625; 0.25]
n := 0 .. 3
i := 1 .. 3
r := 0.5
h := 1
a := 1
E := 0.125
u[0, n] := 2
u[1, 0] := 2
u[2, 0] := 0
u[3, 0] := 0
u[4, n] := 0
u[i, n + 1] := u[i, n] + r*E*(u[i + 1, n] - (2*u[i, n] - u[i - 1, n]))/h^2 - r*a*(u[i + 1, n] - u[i - 1, n])/(2*h)
u[i, n + 1] = [2.375; 0.625; 0; 2.60938; 1.19531; 0.195312; 2.86133; 1.76758; 0.544434; 3.10522; 2.37048; 1.02875]
