n := 0 .. 4
i := 1 .. 3
a := 1
h := 0.25
t := 0.125
r := t/h
u[0, n] := 0
u[1, 0] := 1
u[2, 0] := 1
u[3, 0] := 0
u[4, n] := 0
u[i, n + 1] := u[i, n] - a*r*(u[i, n] - u[i - 1, n])
u[i, n + 1] = [0.5; 1; 0.5; 0.25; 0.75; 0.75; 0.125; 0.5; 0.75; 0.0625; 0.3125; 0.625; 0.03125; 0.1875; 0.46875]
u[i, n + 1] → [0.5; 1; 0.5; 0.25; 0.75; 0.75; 0.125; 0.5; 0.75; 0.0625; 0.3125; 0.625; 0.03125; 0.1875; 0.46875]
u[i, n + 1] := u[i, n] - a*r/2*(u[i + 1, n] - u[i - 1, n]) + a*r^2/2*(u[i + 1, n] - 2*u[i, n] + u[i - 1, n])
u[i, n + 1] = [0.625; 1.125; 0.375; 0.34375; 1.01562; 0.703125; 0.164062; 0.796875; 0.908203; 0.0605469; 0.56543; 0.97998; 0.00634766; 0.368652; 0.947021]
